# ------------------------------------------------------------------
# Initialization & Substrate Setup (Run once)
# ------------------------------------------------------------------
units           metal
atom_style      atomic
dimension       3
boundary        p p p

# Box作成 (基板読み込み前に定義)
region          mybox0 block -500 500 -500 500 -500 500
create_box      3 mybox0

# 基板データの読み込み
# ★注意: 手元のデータファイル名に変更してください
read_data       diamond_160A_with_vacancies.data add append
mass 3 14.0067

# グループ定義（リスタート後も使えるようにIDで定義推奨だが、ここでは再定義する）
group           C_sub type 1
group           Fixed_sub type 2

# 基板の初期化（温度設定など）
velocity        C_sub create 300 12345 mom yes dist gaussian
velocity        Fixed_sub set 0.0 0.0 0.0
fix             hold Fixed_sub setforce 0.0 0.0 0.0

# ★重要: ここで「注入直前」のクリーンな状態を保存します
write_restart   restart.clean_substrate

# ------------------------------------------------------------------
# Force field / Neighbor / Fix (Run once)
# ------------------------------------------------------------------
pair_style      tersoff/zbl
pair_coeff      * * diamond_nv.tersoff.zbl C C N

neighbor        2.0 bin
neigh_modify    every 1 delay 0 check yes

fix             f1 all nve

# 原子IDの最大値（最後に作った原子IDを拾うため）
compute         idall all property/atom id
compute         maxid all reduce max c_idall

# ------------------------------------------------------------------
# Loop Start (10 implantations, no substrate reset)
# ------------------------------------------------------------------
# ループ変数の定義 (m = 1 to 10)
variable        m loop 10

label           loop_start

    # 連続注入: clear/read_restart は行わず、前回の損傷・注入原子を保持します

    # --------------------------------------------------------------
    # Random Injection Setup
    # --------------------------------------------------------------
    # 乱数シードをループ回数(m)に応じて変える
    variable        rnd_seed equal 12345+${m}
    variable        rnd_seed_y equal 67890+${m}

    # ランダム位置の計算 (例: -10A ~ 10A の範囲)
    # 基板サイズに合わせて範囲を調整してください
    variable        x_pos equal random(-10.0,10.0,${rnd_seed})
    variable        y_pos equal random(-10.0,10.0,${rnd_seed_y})

    # N原子の生成 (Type 3)
    # create_atoms後に「最大ID=最後に作った原子」とみなして、その1個だけに速度を付ける
    create_atoms    3 single ${x_pos} ${y_pos} 200 units box
    variable        new_id equal c_maxid
    group           N_new id ${new_id}

    # 初速度の付与 (1.6 keV N, 7° tilt to avoid channeling)
    variable        v_mag equal 2624.3
    variable        tilt_rad equal 7*PI/180
    variable        phi_rad equal random(0.0,360.0,${rnd_seed})*PI/180
    variable        vxs equal ${v_mag}*sin(${tilt_rad})*cos(${phi_rad})
    variable        vys equal ${v_mag}*sin(${tilt_rad})*sin(${phi_rad})
    variable        vzs equal -${v_mag}*cos(${tilt_rad})
    velocity        N_new set ${vxs} ${vys} ${vzs}

    # --------------------------------------------------------------
    # Run Simulation
    # --------------------------------------------------------------
    timestep        0.0001

    # Output設定 (ファイル名にループ番号 ${m} を含める)
    thermo          100
    thermo_style    custom time ke pe etotal temp

    # dumpファイルも毎回別名で保存 (例: run_1.xyz, run_2.xyz...)
    dump            d1 all xyz 100 dump_run_${m}.xyz
    dump_modify     d1 element C_sub Fixed_C N

    # 実行
    run             2000

    # 結果の保存 (dataファイル)
    write_data      final_data_run_${m}.data

    # dumpの後始末
    undump          d1

    # 次のループへ
    next            m
    jump            SELF loop_start

# Loop End
print           "All 10 simulations completed."
